variable folder string Nov_26/

read_restart ${folder} 		#___________________________________
reset_timestep 61000000					  			   		#___________________________________


#--------------------------------------------------------
#--------------------------------------------------------
bond_style   hybrid harmonic
angle_style  hybrid harmonic

bond_coeff   1 harmonic 800.00   0.9572
angle_coeff  1 harmonic 300.00   104.52

pair_style  hybrid/overlay lj/cut 4.5 lj/cut/tip4p/long 1 2 1 1 0.15 4.5 4.5
kspace_style pppm/tip4p 0.9e-5

# O - 1
# H - 2
# C - 3

# these parameters are taken from LAMMPS website.
pair_coeff 1 1  lj/cut/tip4p/long 0.1550 3.1536 	# O-O
pair_coeff 1 2  lj/cut/tip4p/long 0.0 0.0 			# O-H
pair_coeff 2 2  lj/cut/tip4p/long 0.0 0.0 			# H-H

# for CH4 OPLS_SITE model is used
pair_coeff 3 3 lj/cut 0.294 3.73 				# do as Jorengson says.

# for water CH4 interaction -- Lorentz-Berthelot rules
pair_coeff 1 3 lj/cut 0.2135 3.4418
pair_coeff 2 3 lj/cut 0.0 1.865
#--------------------------------------------------------
#--------------------------------------------------------


neighbor                1.0 bin
neigh_modify            delay 0 every 1 check yes


variable tdamp string 500 			#___________________________________
variable pdamp string 2500  		#___________________________________
variable therm string 300   		#___________________________________
variable FILENAME string Nov_26  	#___________________________________


fix			2 all shake 0.0001 20 0 b 1 a 1
fix         NPT all npt temp 260.0 260.0 ${tdamp} iso 200.0 200.0 ${pdamp}


thermo         ${therm}
thermo_style custom step cpuremain enthalpy press temp pe ke etotal vol


timestep        2
#___________________________________

dump           NPT_vmd all atom 1000 ${folder}vmd_NPT_${tdamp}_${pdamp}_${FILENAME}.lammpstrj
dump_modify    NPT_vmd element O H C


dump          NPT all xyz 1000 ${folder}xyz_NPT_${tdamp}_${pdamp}_${FILENAME}.lammpstrj
dump_modify    NPT element O H C
#dump_modify    NPT pbc yes


#dump      custom_NPT all custom 1000 ${folder}dump_NPT_${tdamp}_${pdamp}_${FILENAME}.lammpstrj id, mol, type, element, mass, x, y, z, vx, vy, vz, q
#___________________________________

log            ${folder}run_npt_${FILENAME}.txt

restart  100000 ${folder}restart_NPT_*_${pdamp}_${FILENAME}
restart  10000 ${folder}restart_NPT_${pdamp}_${FILENAME}.1 restart_NPT_${pdamp}_${FILENAME}.2

run 		   100000000

write_restart   ${folder}restart_last_NPT_${tdamp}_${pdamp}_${FILENAME}
